*Heading
** Job name: PlasticLug_Hard_00025 Model name: Model-1
** Generated by: Abaqus/CAE 2022
*Preprint, echo=NO, model=NO, history=NO, contact=NO
**
** PARTS
**
*Part, name=Lug
*Node
      1, 0.0549999997, 0.0149999997, 0.0199999996
      2, 0.0549999997, 0.0149999997,           0.
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*Element, type=C3D20R
   1,   144,  1120,  3331,   656,     1,    27,   544,    56,  7870,  7869,  7868,  7867,  7871,  7872,  7873,
       7874,  7876,  7875,  7877,  7878
   2,  1120,  1121,  3332,  3331,    27,    28,   545,   544,  7881,  7880,  7879,  7869,  7882,  7883,  7884,
       7872,  7875,  7885,  7886,  7877
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*Nset, nset=_PickedSet2, internal, generate
     1,  29852,      1
*Elset, elset=_PickedSet2, internal, generate
    1,  6336,     1
** Section: LugSection
*Solid Section, elset=_PickedSet2, material=Steel
,
*End Part
**
**
** ASSEMBLY
**
*Assembly, name=Assembly
**
*Instance, name=Lug-1, part=Lug
*End Instance
**
*Nset, nset=BuiltIn, instance=Lug-1
     5,     6,     7,     8,    17,    18
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*Elset, elset=BuiltIn, instance=Lug-1
 2089, 2090, 2091, 2092, 2093, 2094
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*Nset, nset=HoleBot, instance=Lug-1
    23,    24,   444,   445,   446,   447
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*Elset, elset=HoleBot, instance=Lug-1
 5329, 5330, 5331, 5332, 5333, 5334, 5335, 5336, 6301, 6306, 6311, 6316, 6321, 6326, 6331, 6336
*Nset, nset=_PickedSet4, internal, instance=Lug-1
     5,     6,     7,     8,    17,    18
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*Elset, elset=_PickedSet4, internal, instance=Lug-1
 2089, 2090, 2091, 2092, 2093, 2094
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*Elset, elset=__PickedSurf5_S3, internal, instance=Lug-1
 5969, 5970, 5971, 5972, 5973, 5974
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*Elset, elset=__PickedSurf5_S4, internal, instance=Lug-1, generate
 5989,  6008,     1
*Elset, elset=__PickedSurf5_S2, internal, instance=Lug-1
 5329, 5330, 5331, 5332, 5333, 5334
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*Surface, type=ELEMENT, name=_PickedSurf5, internal
__PickedSurf5_S3, S3
__PickedSurf5_S4, S4
__PickedSurf5_S2, S2
*End Assembly
*Amplitude, name=V_E_U_amp
             0., 9.86083951421695e-20,            0.01, 0.00512624209642948,            0.02, 0.0109665747383671,            0.03, 0.0175087514203764
           0.04, 0.0247267649830729,            0.05, 0.0325809339523822,            0.06, 0.0410184811683444,            0.07, 0.0499746107400542
           0.08, 0.0593740636307603,            0.09, 0.0691331045830572,             0.1, 0.0791618651322792,            0.11, 0.0893669408781697
           0.12, 0.099654117908444,            0.13, 0.109931085254086,            0.14, 0.120109979361238,            0.15, 0.130109604375958
           0.16, 0.139857179709831,            0.17, 0.149289484455574,            0.18, 0.15835329661673,            0.19, 0.167005062890366
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           0.96, 0.0830978177510169,            0.97, 0.0913757549831153,            0.98, 0.0983696135568683,            0.99, 0.104035373121021
**
** MATERIALS
**
*Material, name=Steel
*Elastic
 2e+11, 0.3
*Plastic
 3.8e+08,   0.
 5.8e+08, 0.35
** ----------------------------------------------------------------
**
** STEP: LugLoad
**
*Step, name=LugLoad, nlgeom=NO
Apply uniform pressure to the hole
*Static
0.2, 1., 1e-07, 1.
**
** BOUNDARY CONDITIONS
**
** Name: Fix left end Type: Symmetry/Antisymmetry/Encastre
*Boundary
_PickedSet4, ENCASTRE
**
** LOADS
**
** Name: Pressure load   Type: Pressure
*Dsload, amplitude=V_E_U_amp
_PickedSurf5, P, 1e+08
**
** OUTPUT REQUESTS
**
*Restart, write, frequency=0
**
** FIELD OUTPUT: F-Output-1
**
*Output, field
*Node Output
U,
*Element Output, position=NODES, directions=YES
MISES,PEEQ
*Output, history, frequency=0
*End Step
